Prescott Pusher wing + T-tail, stations from the RCM 1986 1/5 plan (x from wing root LE = FS 195.1, ft)
#Mach
0.15
#IYsym IZsym Zsym
0 0 0.0
#Sref Cref Bref
113.0 3.893 30.0
#Xref Yref Zref
1.80 0.0 0.0
#CDp
0.0
SURFACE
Wing
12 1.0 30 -2.0
YDUPLICATE
0.0
ANGLE
2.0
SECTION
0.0 0.0 0.0 4.67 0.0
SECTION
2.726 15.0 0.786 3.00 -1.5
SURFACE
HTail
10 1.0 14 -2.0
YDUPLICATE
0.0
ANGLE
-3.0
SECTION
8.117 0.0 6.2 3.33 0.0
SECTION
10.011 5.5 6.2 2.17 0.0
