joined
0.2
0 0 0.0
150.0 2.3145502494313788 32.4037034920393
2.3146 0 0
0.0
SURFACE
Front
8 1.0 24 -2.0
YDUPLICATE
0.0
SECTION
0.0000 0.0 0.0000 2.3146 0.0
SECTION
7.5550 16.2019 0.0000 2.3146 0.0
SURFACE
Rear
8 1.0 24 -2.0
YDUPLICATE
0.0
SECTION
15.1101 0.0 8.1009 2.3146 0.0
SECTION
7.5550 16.2019 0.0000 2.3146 0.0
