cozy
0.25
0 0 0
103.0 3.3 28.1
10.0 0 0
0.0
SURFACE
Canard
8 1.0 16 -2.0
YDUPLICATE
0.0
SECTION
0 0 0.5 1.1667 0
NACA
2412
SECTION
0 6.3 0.5 1.1667 0
NACA
2412
SURFACE
Wing
10 1.0 24 -2.0
YDUPLICATE
0.0
SECTION
9.0 0 0 4.1898 0
NACA
2412
SECTION
14.9639 14.0500 0 2.0949 0
NACA
2412
