jw_V_cdf
0.25
0 0 0.0
153.0896 2.3870 32.7357
5.6018 0.0 0.0
0.0
SURFACE
Front
12 1.0 24 -2.0
YDUPLICATE
0.0
SECTION
0.0 0.0 0.0 2.9228 0.0
NACA
2412
SECTION
9.7423 16.3679 0.0 1.7537 0.0
NACA
2412
SURFACE
Rear
12 1.0 24 -2.0
YDUPLICATE
0.0
SECTION
9.7423 0.0 3.6009 2.9228 0.0
NACA
2412
SECTION
9.7423 16.3679 3.6009 1.7537 0.0
NACA
2412
SURFACE
Tipfin
8 1.0 8 -2.0
YDUPLICATE
0.0
SECTION
9.7423 16.3679 0.0 1.7537 0.0
SECTION
9.7423 16.3679 3.6009 1.7537 0.0
