pf_D2_V_cdf
#Mach
0.25
#IYsym IZsym Zsym
0 0 0.0
#Sref Cref Bref
336.5365 15.8664 25.9436
#Xref Yref Zref
11.6854 0.0 0.0
#CDp
0.0
SURFACE
Wing
12 1.0 28 -2.0
YDUPLICATE
0.0
SECTION
0.0 0.0 0.0 23.5851 0.0
NACA
0014
SECTION
21.2266 12.9718 0.0 2.3585 0.0
NACA
0014
